Y(x) := cos(x^3) + x^(3*x)
y3(x) := e^x
y1(x) := sinh(x^2)
y2(x) := cosh(x^2)
y(x) := 1/cos(x)
b(x) := 7
N(x) := x^3 + 2*x^2 + 4*x + 1
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f(x) := limit(y(x)/x, x → ∞)*x + limit(y(x) - x, x → ∞) → -∞
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x1 := 0, 0.1 .. 30
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